folder Simulations: version=36; creator=Apsim 7.7-r3715
  simulation Base
    clock
    metfile Met: filename=%apsim%\Examples\MetFiles\dalby.met
    summaryfile
    area Paddock
      manager2 Management: Reference=ApsimFile.dll
        DateReportWasGenerated = 2015-04-17  # The date the report was generated
        ProbeDepths =  # The depth layer structure of probes
        CropName = Wheat  # Crop to be sown
        NUnlimited = no  # N Unlimited?
        NUnlimitedFromToday = no  # N unlimited from today?
        WriteDepthFile = no  # Write a depth.out file?
        DryNext10Days = no  # Dry for next 10 days?
        FertiliserCost = 1.2  # Cost of N fertiliser ($/ha)
        FertiliserApplicationCost = 15  # Cost of N application ($/ha)
        WaterCost = 0  # Cost of water ($/Ml)
        APH1Price = 240  # APH1 Price ($/t)
        APH2Price = 200  # APH2 Price ($/t)
        H2Price = 180  # H2 Price ($/t)
        APWPrice = 160  # APW Price ($/t)
        ASWPrice = 140  # ASW Price ($/t)
        APH1Protein = 14  # APH1 Protein (%)
        APH2Protein = 13  # APH2 Protein (%)
        H2Protein = 11.5  # H2 Protein (%)
        APWProtein = 10.5  # APW Protein (%)
        ASWProtein = 0  # ASW Protein (%)
```csharp
          using System;
          using System.IO;
          using System.Xml;
          using ModelFramework;
          using CSGeneral;
          using ApsimFile;

          public class Script
          {
          private double AvProbeTempValue = 0;
          private double CumulativeProbeRainSinceStartSeasonValue = 0;
          private bool ProbeRainHasStarted = false;
          private int NumConsecWaterLoggedDays = 0;
          private Soil Soil;
          private double[] ProbeThicknesses = null;
          private double organic_C_start = 0;
          private double dsli;

          [Link] Paddock Paddock;
          [Link] Fertiliser Fertiliser;
          [Link] MetFile Met;

          [Input] string title;
          [Input] DateTime Today;
          [Input(IsOptional=true)] double node_no;        // Sorghum doesn't have a node_no hence optional.
          [Input(IsOptional=true)] double zadok_stage;    // Optional because canola doesn't have this variable.
          [Input] int DaysAfterSowing;
          [Input] double runoff;
          [Input] double drain;
          [Input] double[] dlayer;
          [Input] double[] sw_dep;
          [Input] double[] sw;
          [Input] double[] ll_dep;
          [Input] double[] ll15_dep;
          [Input] double[] air_dry;
          [Input(IsOptional=true)] double[] xf;           // Sorghum doesn't have this as an output hence optional
          [Input] double[] dul;
          [Input] double[] sat;
          [Input] double[] dul_dep;
          [Input] double[] sat_dep;
          [Input] double[] dlt_n_min_tot;
          [Input] double[] no3;
          [Input] double[] nh4;
          [Input] double[] biom_c;
          [Input] double[] hum_c;
          [Input(IsOptional=true)] double[] no3_uptake;    // Sorghum doesn't have this
          [Input] double maxt;
          [Input] double mint;
          [Input(IsOptional=true)] double origmaxt = -999; // Short term met file doesn't have this.
          [Input(IsOptional=true)] double origmint = -999; // Short term met file doesn't have this.
          [Input] double rain;
          [Input] double biomass_n;
          [Input] double RootGreenN;
          [Input] double fertiliser;
          [Input] double irrig_tot;
          [Input(IsOptional=true)] double unpatched_rain;
          [Input(IsOptional=true)] double Yield;
          [Input(IsOptional=true)] double grain_protein;
          [Input(IsOptional=true)] double Biomass;
          [Input(IsOptional=true)] double root_depth;
          [Input(IsOptional=true)] double podGreenWt;
          [Input] double[] ave_soil_temp = null;
          [Input(IsOptional=true)] double ttafterstart_grain_fill = 0;   // peanut variable
          [Input(IsOptional=true)] double start_grain_fillTTTarget = 0;  // peanut variable
          [Input(IsOptional=true)] double cover_tot = 0;                 // peanut variable
          [Input(IsOptional=true)] double EP = 0;                        // peanut variable
          [Input(IsOptional=true)] double Stage = 0;                     // peanut variable
          [Input] double[] WeeklyEP;                                     // tracker variable


          [Param(IsOptional=true)] DateTime DateReportWasGenerated;
          [Param] string CropName;
          [Param] bool NUnlimited;
          [Param] bool NUnlimitedFromToday;
          [Param] bool WriteDepthFile;
          [Param] bool DryNext10Days;

          [Param] double FertiliserCost;
          [Param] double FertiliserApplicationCost;
          [Param] double WaterCost;
          [Param] double APH1Price;
          [Param] double APH2Price;
          [Param] double H2Price;
          [Param] double APWPrice;
          [Param] double ASWPrice;
          [Param] double APH1Protein;
          [Param] double APH2Protein;
          [Param] double H2Protein;
          [Param] double APWProtein;
          [Param] double ASWProtein;

          [Output][Param(IsOptional=true)] double[] ProbeDepths = null;
          [Output] double AvTemp;
          [Output] string AvProbeTemp = "*";
          [Output] double CumulativeRainSinceStartSeason = 0;
          [Output] string CumulativeProbeRainSinceStartSeason = "*";
          [Output] string ProbeMinT = "*";
          [Output] string ProbeMaxT = "*";
          [Output] string AustState;
          [Output] double Z;
          [Output] int Zadok11Das;
          [Output] int Zadok12Das;
          [Output] int Zadok13Das;
          [Output] int Zadok14Das;
          [Output] int Zadok15Das;
          [Output] int Zadok16Das;
          [Output] int Zadok30Das;
          [Output] int Zadok31Das;
          [Output] int Zadok32Das;
          [Output] int Zadok37Das;
          [Output] int Zadok39Das;
          [Output] int Zadok45Das;
          [Output] int Zadok55Das;
          [Output] int Zadok65Das;
          [Output] int Zadok75Das;
          [Output] int Stage2Das;
          [Output] int Stage3Das;
          [Output] int Stage4Das;
          [Output] int Stage5Das;
          [Output] int Stage6Das;
          [Output] int Stage7Das;
          [Output] int Stage8Das;
          [Output] int Stage9Das;
          [Output] int MildHeatShockCount { get; set; }
          [Output] int ModerateHeatShockCount { get; set; }
          [Output] int SevereHeatShockCount { get; set; }
          [Output] int MildFrostCount { get; set; }
          [Output] int ModerateFrostCount { get; set; }
          [Output] int SevereFrostCount { get; set; }
          [Output] double[] VirtualProbeSW = null;
          [Output] double Zero { get { return 0.0; } }
          [Output] DateTime SowDate;
          [Output] double BankBalance = 0;
          [Output] double aflo_perc;     // Peanut aflatoxin risk (%)
          [Output] double watersupply;
          [Output] double fasw = 0;
          [Output] double TAW;
          [Output] double FCW;
          [Output] double RAW;
          [Output] double NextIrrig;
          [Output] double WetYield
          {
          get
          {
          double MoistureContent = 12;
          if (CropName == "Canola")
          MoistureContent = 8;
          return Yield / (1 - MoistureContent / 100.0) / 1000;
          }
          }
          [Output] double PeanutPodYield
          {
          get
          {
          return podGreenWt * 10.0 + Yield; // Calculate peanut pod yield at 12% moisture
          }
          }
          [Output] double PercentCover
          {
          get
          {
          return cover_tot * 100.0;
          }
          }
          [Output] double HayBiomass
          {
          get
          {
          // Calculate hay biomass and convert kg / ha to t/ha - assume 13 % moisture
          double CropBiomass = (Biomass / (1.0 - 13 / 100.0) / 1000);
          double HayBiomassPercent;
          if (Biomass >= 2000 && Biomass <= 12000)
            HayBiomassPercent = 70.0 + (Biomass - 2000) / (12000 - 2000) * 5;
         else if (Biomass > 12000)
            HayBiomassPercent = 75 + (Biomass - 12000) / (25000 - 12000) * 5;
         else
            HayBiomassPercent = 70;
            
         return (HayBiomassPercent / 100.0) * CropBiomass;
      }
   }
   [Output] double PAWC
   {
      get
      {
         double[] PAWC = Soil.CalcPAWC(dlayer, ll_dep, dul_dep, xf);
         return MathUtility.Sum(PAWC);          
      }
   }
   [Output] double AvailableWater
   {
      get
      {
         double[] PAW = Soil.CalcPAWC(dlayer, ll_dep, sw_dep, xf);
         if (PAW == null)
            return 0;      // Will be null for sorghum model
         else
            return MathUtility.Sum(PAW);          
      }
   }
   [Output] double Mineralisation
   {
      get
      {
         // Don't return negative mineralisations - negative numbers are returned
         // in the NitrogenTieUp property below.
         double TotalMineralisation = MathUtility.Sum(dlt_n_min_tot);
         if (TotalMineralisation >= 0)
            return TotalMineralisation;
         else
            return 0;
      }
   }   
   [Output] double Nitrogen
   {
      get
      {
         return MathUtility.Sum(no3) + MathUtility.Sum(nh4);
      }
   }
   [Output] double NitrogenTieUp
   {
      get
      {
         // Don't return negative mineralisations - negative numbers are returned
         // in the NitrogenTieUp property below.
         double TotalMineralisation = MathUtility.Sum(dlt_n_min_tot);
         if (TotalMineralisation >= 0)
            return 0;
         else
            return -TotalMineralisation;  // return a +ve number
      }
   }   
   [Output] double AmountWaterAboveCLL
   {
      get
      {
         double amount = SwToday - CLLToday;
         if (amount < 0)
            amount = 0;
         
         return amount;
      }
   }
 
   [Output] double SwToday
   {
      get
      {
         double[] cumThickness = Soil.ToCumThickness(dlayer); // mm
         double[] cumSWDEP = Soil.ToCumThickness(sw_dep); // mm
         bool didInterp;
         return MathUtility.LinearInterpReal(root_depth, cumThickness, cumSWDEP, out didInterp);
      }
   } 
   
   [Output] double CLLToday
   {
      get
      {
         if (ll_dep.Length > 0) // Sorghum gives a zero length ll_dep sometimes.
         {
            double[] cumThickness = Soil.ToCumThickness(dlayer); // mm
            double[] cumCLL = Soil.ToCumThickness(ll_dep); // mm
            bool didInterp;
            return MathUtility.LinearInterpReal(root_depth, cumThickness, cumCLL, out didInterp);
         }
         return 0;
      }
   }
   
   [Output] double DULToday
   {
      get
      {
         double[] cumThickness = Soil.ToCumThickness(dlayer); // mm
         double[] cumDUL = Soil.ToCumThickness(dul_dep); // mm
         bool didInterp;
         return MathUtility.LinearInterpReal(root_depth, cumThickness, cumDUL, out didInterp);
      }
   }
   
   [Output] double CritSWToday
   {
      get
      {
         return CLLToday + (DULToday - CLLToday) * 0.30;
      }
   }
 
   [Output] double AmountWaterLeft
   {
      get
      {
         return SwToday - CritSWToday;
      }
   }
     
   [Output] double NO3AvailToRoots
   {
      get
      {
         double[] cumThickness = Soil.ToCumThickness(dlayer); // mm
         double[] cumN = Soil.ToCumThickness(no3); // kg/ha
         bool didInterp;
         return MathUtility.LinearInterpReal(root_depth, cumThickness, cumN, out didInterp);
      }
   }

   [Output] double NInPlant
   {
      get
      {
         return (biomass_n * 10) + (RootGreenN * 10);    // unit conversion g/m2 to kg/ha
      }
   }
   
   [Output] double NUptakeKgHa
   {
      get
      {
         return MathUtility.Sum(no3_uptake) * -1; // convert to positive number
      }
   }   
       
   [Output] int MildHeatShockAdditiveCount
   {
      get
      {
         return MildHeatShockCount + ModerateHeatShockCount + SevereHeatShockCount;
      }
   } 
   
   [Output] int ModerateHeatShockAdditiveCount
   {
      get
      {
         return ModerateHeatShockCount + SevereHeatShockCount;
      }
   }    
   
   [Output] int MildFrostAdditiveCount
   {
      get
      {
         return MildFrostCount + ModerateFrostCount + SevereFrostCount;
      }
   } 
   
   [Output] int ModerateFrostAdditiveCount
   {
      get
      {
         return ModerateFrostCount + SevereFrostCount;
      }
   }     

   [Output] double ChangeInOrganicC
   {
      get
      {
         return MathUtility.Sum(biom_c) + MathUtility.Sum(hum_c) - organic_C_start;
      }
   }     
   
   // ------------------------------------------------------------------------------
   // The following event handler will be called once at the START OF THE SIMULATION
   // ------------------------------------------------------------------------------
   [EventHandler] public void OnInitialised()
   {
      organic_C_start = MathUtility.Sum(biom_c) + MathUtility.Sum(hum_c);

      if (origmint != -999)
         Console.WriteLine("Using original minimum temperatures for frost/heat calculations");

      if (origmaxt != -999)
         Console.WriteLine("Using original maximum temperatures for frost/heat calculations");
   }
      
   // ------------------------------------------------------------------------------
   // The following event handler will be called each day at the very BEGINNING of the day
   // before the input module has finished reading in weather data.
   // ------------------------------------------------------------------------------
   [EventHandler] public void OnPreNewMet(NewMetType Data)
   {
      DateTime DateReportGeneratedPlus10Days = DateReportWasGenerated.AddDays(10);
      if (DryNext10Days && Today > DateReportWasGenerated && Today <= DateReportGeneratedPlus10Days)
      {
         Met.Rain = 0.0F;
      }
   }
   
   // ------------------------------------------------------------------------------
   // The following event handler will be called each day at the BEGINNING of the day
   // ------------------------------------------------------------------------------
   [EventHandler] public void OnPrepare()
   {
      if (ProbeDepths != null && ProbeDepths.Length > 0)
      {
         if (ProbeThicknesses == null)
         {
            // read in soil node.
            if (Soil == null)
            {
               XmlDocument Doc = new XmlDocument();
               Doc.Load("soil.xml");
               Soil = Soil.Create(Doc.DocumentElement.OuterXml);
            }
         
            // **********************
            // Soil Probe Crop Report
            // **********************
            
            if (VirtualProbeSW == null)
            {
               VirtualProbeSW = new double[ProbeDepths.Length];
               ProbeThicknesses = new double[ProbeDepths.Length + 1];
               ProbeThicknesses[0] = ProbeDepths[0] / 2 * 10;
               for (int i = 0; i < ProbeDepths.Length; i++)
               {
                  if (i == 0)
                     ProbeThicknesses[i + 1] = ProbeDepths[i] * 10;
                  else
                     ProbeThicknesses[i + 1] = (ProbeDepths[i] - ProbeDepths[i - 1]) * 10;
               }
            }
         }         
      }

      fasw = 0.0;
      if (ll_dep != null && ll_dep.Length == sw_dep.Length)
      {
         double paw = MathUtility.Sum(MathUtility.Subtract(sw_dep, ll_dep));
         double pawc = MathUtility.Sum(MathUtility.Subtract(dul_dep, ll_dep));
         fasw = paw / pawc;
         fasw = Math.Abs(MathUtility.Bound(fasw, 0, 1));
      }
      
      if (DaysAfterSowing == 1)
         SowDate = Today.AddDays(-1);
      
      // Calculate a cumulative unpatched rainfall from start of growing season.
      object PatchRainObj;
      if (Paddock.GetObject("patch_rain", out PatchRainObj) && PatchRainObj.ToString() != "*")
      {
         double PatchRain = Convert.ToDouble(PatchRainObj.ToString());

         ProbeRainHasStarted = true;
         CumulativeProbeRainSinceStartSeasonValue += PatchRain;
         CumulativeProbeRainSinceStartSeason = CumulativeProbeRainSinceStartSeasonValue.ToString("f3");
      }
      else
         CumulativeProbeRainSinceStartSeason = "*";

      //if (ProbeRainHasStarted)
      CumulativeRainSinceStartSeason += unpatched_rain;
         

      // Calculate average temp and average probe temp
      AvTemp = (maxt + mint) / 2.0;
      
      object ProbeMaxTObj = null;
      object ProbeMinTObj = null;
      bool probeTempsFound = Paddock.GetObject("probe_maxt", out ProbeMaxTObj) &&
         Paddock.GetObject("probe_mint", out ProbeMinTObj);
      if (!probeTempsFound)
      {
         probeTempsFound = Paddock.GetObject("patch_maxt", out ProbeMaxTObj) &&
            Paddock.GetObject("patch_mint", out ProbeMinTObj);
      }
         
      if (probeTempsFound &&
         ProbeMaxTObj.ToString() != "*" && ProbeMinTObj.ToString() != "*")
      {
         ProbeMaxT = ProbeMaxTObj.ToString();
         ProbeMinT = ProbeMinTObj.ToString();
         double probeMaxT = Convert.ToDouble(ProbeMaxT);
         double probeMinT = Convert.ToDouble(ProbeMinT);
         AvProbeTempValue = (probeMaxT + probeMinT) / 2.0;
         AvProbeTemp = AvProbeTempValue.ToString("f3");
      }
      else
      {
         ProbeMaxT = "*";
         ProbeMinT = "*";
         AvProbeTemp = "*";
      }
      
      // N unlimited
      if (NUnlimited && NO3AvailToRoots < 100 && DaysAfterSowing > 0)
         Fertiliser.Apply(100.0f, 20.0f, "NO3_N");
      
      // N unlimited from today
      if (NUnlimitedFromToday && NO3AvailToRoots < 100 && DaysAfterSowing > 0 &&
         Today > DateReportWasGenerated)
         Fertiliser.Apply(100.0f, 20.0f, "NO3_N");
      
      // Peanut irrigation deficit.
      double Depletion_fraction;
      double AWwateruse;
      double critfasw = 0.50;
      if (DaysAfterSowing < 7)
      {
         AWwateruse = EP;
         Depletion_fraction = 0.5;
      }
      else
      {
         AWwateruse = WeeklyEP[0];
         Depletion_fraction = critfasw + (0.04 * (5 - WeeklyEP[0]));
      }

      if  (Depletion_fraction <= 0.1)
         Depletion_fraction = 0.1;

      else if (Depletion_fraction >= 0.8)
         Depletion_fraction = 0.8;
  
      // water depletion and irrigaiton requirement calculations
      TAW = 0;
      double TAW1 = ((dul_dep[0] - ll15_dep[0]) + (dul_dep[1] - ll15_dep[1]) + (dul_dep[2] - ll15_dep[2])) / (dlayer[0] + dlayer[1] + dlayer[2]) * 500;
      FCW = (((dul_dep[0] - sw_dep[0]) + (dul_dep[1] - sw_dep[1]) + (dul_dep[2] - sw_dep[2])) / (dlayer[0] + dlayer[1] + dlayer[2]) * 500) - drain;
      RAW = TAW1 * Depletion_fraction;
      double Refillpoint = TAW1 - RAW;
      double fesw = ((sw_dep[0] - ll15_dep[0]) + (sw_dep[1] - ll15_dep[1]) + (sw_dep[2] - ll15_dep[2])) / ((dul_dep[0] - ll15_dep[0]) + (dul_dep[1] - ll15_dep[1]) + (dul_dep[2] - ll15_dep[2]));
      double deficit = (dul_dep[0] - sw_dep[0]) + (dul_dep[1] - sw_dep[1]) + (dul_dep[2] - sw_dep[2]);
    
      if (DaysAfterSowing > 0 && Stage <= 8 && fesw <= 0.5 && dsli > 5)
      {
         watersupply = (TAW1 * (1 - fesw)) / 0.8;
         dsli = 0;
      }
      else 
         watersupply = 0;
      
      
      NextIrrig = 0;
      if (DaysAfterSowing > 0 && AWwateruse > 0 && FCW < TAW)
         NextIrrig = RAW / AWwateruse;
      else if (DaysAfterSowing > 0 && AWwateruse > 0 && FCW > TAW)
         NextIrrig = (RAW - FCW) / AWwateruse;
      
      if (NextIrrig > 15)
         NextIrrig = 15;
      
      dsli = dsli + 1;
   }
   
   
   // ------------------------------------------------------------------------------
   // The following event handler will be called each day at the END of the day
   // ------------------------------------------------------------------------------
   [EventHandler] public void OnPost()
   {
      
      // Improved Zadok_stage
      if (zadok_stage < 30)
      {
         Z = node_no + 9;
         if (CropName == "Barley")
            Z++;
         if (Z > 16)
            Z = 16;
      }
      else
         Z = zadok_stage;

      if (DaysAfterSowing == 1)
      {
         Zadok11Das = 0;
         Zadok12Das = 0;
         Zadok13Das = 0;
         Zadok14Das = 0;
         Zadok15Das = 0;
         Zadok16Das = 0;
         Zadok30Das = 0;
         Zadok31Das = 0;
         Zadok32Das = 0;
         Zadok37Das = 0;
         Zadok39Das = 0;
         Zadok45Das = 0;
         Zadok55Das = 0;
         Zadok65Das = 0;
         Zadok75Das = 0;
      }
      if (Z >= 11 && Zadok11Das == 0) 
         Zadok11Das = DaysAfterSowing;
      else if(Z >= 12 && Zadok12Das == 0) 
         Zadok12Das = DaysAfterSowing;
      else if(Z >= 13 && Zadok13Das == 0) 
         Zadok13Das = DaysAfterSowing;
      else if(Z >= 14 && Zadok14Das == 0) 
         Zadok14Das = DaysAfterSowing;
      else if(Z >= 15 && Zadok15Das == 0) 
         Zadok15Das = DaysAfterSowing;
      else if(Z >= 16 && Zadok16Das == 0) 
         Zadok16Das = DaysAfterSowing;
      else if(Z >= 30 && Zadok30Das == 0) 
         Zadok30Das = DaysAfterSowing;
      else if(Z >= 31 && Zadok31Das == 0) 
         Zadok31Das = DaysAfterSowing;
      else if(Z >= 32 && Zadok32Das == 0) 
         Zadok32Das = DaysAfterSowing;
      else if(Z >= 37 && Zadok37Das == 0) 
         Zadok37Das = DaysAfterSowing;
      else if(Z >= 39 && Zadok39Das == 0) 
         Zadok39Das = DaysAfterSowing;
      else if(Z >= 45 && Zadok45Das == 0) 
         Zadok45Das = DaysAfterSowing;
      else if(Z >= 55 && Zadok55Das == 0) 
         Zadok55Das = DaysAfterSowing;
      else if(Z >= 65 && Zadok65Das == 0) 
         Zadok65Das = DaysAfterSowing;
      else if(Z >= 75 && Zadok75Das == 0) 
         Zadok75Das = DaysAfterSowing;
         
      CalculateStageVariables();

      // Count waterlogging events in crop
      //double swTop2Layers = sw_dep[0] + sw_dep[1];
      //double satTop2Layers = sat_dep[0] + sat_dep[1];
      // Is soil water in top layer greather than DUL?
      if (sw_dep[0] >= dul_dep[0] && 
         DaysAfterSowing > 0 && 
         Today.DayOfYear >= DateReportWasGenerated.DayOfYear)
         NumConsecWaterLoggedDays++;
      else
      {
         // At the end of the water logging event, publish the appropriate events so that tracker can count them.
         if (NumConsecWaterLoggedDays >= 1)
            Paddock.Publish("WaterLog1OrMore");
         if (NumConsecWaterLoggedDays >= 2)
            Paddock.Publish("WaterLog2OrMore");
         if (NumConsecWaterLoggedDays >= 3)
            Paddock.Publish("WaterLog3OrMore");
         if (NumConsecWaterLoggedDays >= 4)
            Paddock.Publish("WaterLog4OrMore");
         if (NumConsecWaterLoggedDays >= 5)
            Paddock.Publish("WaterLog5OrMore");
         if (NumConsecWaterLoggedDays >= 6)
            Paddock.Publish("WaterLog6OrMore");
         NumConsecWaterLoggedDays = 0;
      }
      
      // Update our bank balance.
      GrossMargin();
      
      // Auto harvest crop
      string stageName;
      string plantStatus;
      Paddock.Get(CropName + ".StageName", out stageName);
      Paddock.Get(CropName + ".plant_status", out plantStatus);
      if (stageName == "harvest_ripe" || plantStatus == "dead")
      {
         HarvestType harvest = new HarvestType();
         Paddock.Publish(CropName + ".harvest", harvest);
         Paddock.Publish(CropName + ".end_crop"); 
      }
      
      // Frost risk and heat shock counts
      if (DaysAfterSowing == 1)
      {
         MildHeatShockCount = 0;
         ModerateHeatShockCount = 0;
         SevereHeatShockCount = 0;
         MildFrostCount = 0;
         ModerateFrostCount = 0;
         SevereFrostCount = 0;
      }
      else
      {
         CalculateWheatFrostRisk();
      }
      
      // Send out a CurrentDay event if today is the DateReportWasGenerated.
      // This is used by tracker.
      if (Today.DayOfYear == DateReportWasGenerated.DayOfYear)
         Paddock.Publish("CurrentDay");
      
      // Send out a Next10Days event so that 'Daily' can pick it up.
      DateTime DateReportGeneratedPlus10Days = DateReportWasGenerated.AddDays(10);
      if (DryNext10Days && Today > DateReportWasGenerated && Today <= DateReportGeneratedPlus10Days)
      {
         Paddock.Publish("Next10Days");
      }
      
      // Aflatoxin risk.
      if (CropName.ToLower() == "peanut" && DaysAfterSowing >= 1)
      {
         double adj_ave_soil_temp;
         double aflo_temp_fact = 0;
         adj_ave_soil_temp = ave_soil_temp[0];  // top layer.
         
         if (adj_ave_soil_temp >= 22 && adj_ave_soil_temp <= 30)
         aflo_temp_fact = (adj_ave_soil_temp - 22) / (30 - 22);
         
         if (adj_ave_soil_temp > 30 && adj_ave_soil_temp < 35)
         aflo_temp_fact = (35 - adj_ave_soil_temp) / (35 - 30);
         
         if (adj_ave_soil_temp < 22)
         aflo_temp_fact = 0;
         
         if (adj_ave_soil_temp > 35)
         aflo_temp_fact = 0;
          
         // Aflatoxin  rules for peanut with simulated temperature!!!!!! 
         aflo_perc = 0;
         if (Stage >= 7)
         {
            double gddprop = ttafterstart_grain_fill / start_grain_fillTTTarget;
            double aflo = 0;
            if (gddprop > 0.6 && fasw < 0.2)
               aflo = aflo + (1 * aflo_temp_fact);
            
            aflo_perc = aflo * 3;
            if (aflo_perc > 100)
               aflo_perc = 100;
            
            if (aflo_perc < 0)
               aflo_perc = 0;

            //aflo_conc = -45.369 + (2.9422 * aflo_perc);
            //if (aflo_conc &lt; 0)
            //   aflo_conc = 0;
         }
      }
      
   }
      
  
   // ------------------------------------------------------------------------------
   // The following event handler will be called each day at the END of the day
   // ------------------------------------------------------------------------------
   [EventHandler] public void OnSowing()
   {
      if (WriteDepthFile)
         WriteDepthFileToDisk(); 
   }
   
   private void CalculateWheatFrostRisk()
   {
         double tempmin = mint;
         if (origmint != -999)
            tempmin = origmint;
         
         double tempmax = maxt;
         if (origmaxt != -999)
            tempmax = origmaxt;
         
         if (Z >= 60 && Z < 75.99)
         {
            if (tempmin >= 0 && tempmin < 2)
               MildFrostCount++;
            else if (tempmin >= -2 && tempmin < 0)
               ModerateFrostCount++;
            else if (tempmin < -2)
               SevereFrostCount++;
         }
         if (Z >= 70 && Z < 79.99)
         {
            if (tempmax >= 32 && tempmax < 34)
               MildHeatShockCount++;
            else if (tempmax >= 34 && tempmax < 36)
               ModerateHeatShockCount++;
            else if (tempmax >= 36)
               SevereHeatShockCount++;
         }
   }
  
   // ------------------------------------------------------------------------------
   // Calculate STAGE variables.
   // ------------------------------------------------------------------------------
   private void CalculateStageVariables()
   {
      if (DaysAfterSowing == 1)
      {
         Stage2Das = 0;
         Stage3Das = 0;
         Stage4Das = 0;
         Stage5Das = 0;
         Stage6Das = 0;
         Stage7Das = 0;
         Stage8Das = 0;
         Stage9Das = 0;
      }
      
      if (Stage >= 2 && Stage2Das == 0) 
         Stage2Das = DaysAfterSowing;
      else if (Stage >= 3 && Stage3Das == 0) 
         Stage3Das = DaysAfterSowing;
      else if (Stage >= 4 && Stage4Das == 0) 
         Stage4Das = DaysAfterSowing;
      else if (Stage >= 5 && Stage5Das == 0) 
         Stage5Das = DaysAfterSowing;
      else if (Stage >= 6 && Stage6Das == 0) 
         Stage6Das = DaysAfterSowing;
      else if (Stage >= 7 && Stage7Das == 0) 
         Stage7Das = DaysAfterSowing;
      else if (Stage >= 8 && Stage8Das == 0) 
         Stage8Das = DaysAfterSowing;
      else if (Stage >= 9 && Stage9Das == 0) 
         Stage9Das = DaysAfterSowing;
   }
  
   // ------------------------------------------------------------------------------
   // The following function will create a depth output file.
   // ------------------------------------------------------------------------------
   private void WriteDepthFileToDisk()
   {
      double[] cumThickness = Soil.ToCumThickness(dlayer);
      double[] ll = MathUtility.Divide(ll_dep, dlayer);
      
      StreamWriter writer = new StreamWriter(title + " Depth.out");
      
      writer.WriteLine("Depth AirDry     LL    DUL    SAT      SW     NO3     NH4");
      writer.WriteLine(" (mm)   (mm)   (mm)   (mm)   (mm)    (mm) (kg/ha) (kg/ha)");
      for (int i = 0; i < dlayer.Length; i++)
      {
         writer.WriteLine("{0,5:F0}{1,7:F3}{2,7:F3}{3,7:F3}{4,7:F3}{5,7:F3}{6,8:F1}{7,8:F1}",
            new object[] {cumThickness[i], air_dry[i], ll[i], dul[i], sat[i], sw[i], no3[i], nh4[i]});
      }
      
      writer.Close();
   }
   
   // ------------------------------------------------------------------------------
   // The following function will update the gross margin.
   // ------------------------------------------------------------------------------
   private void GrossMargin()
   {
      // Keep track of the fertiliser applications.
      if (fertiliser > 0)
         BankBalance -= FertiliserCost * fertiliser + FertiliserApplicationCost;

      // Keep track of the irrigation applications.
      if (irrig_tot > 0)
         BankBalance -= WaterCost * (irrig_tot / 100);

      // Calculate gross margin at harvest.
      string stageName;
      string plantStatus;
      Paddock.Get(CropName + ".StageName", out stageName);
      Paddock.Get(CropName + ".plant_status", out plantStatus);
      if (stageName == "harvest_ripe" || plantStatus == "dead")
      {
         double FullPrice;
         if (grain_protein > APH1Protein)
            FullPrice = APH1Price;
         else if (grain_protein > APH2Protein)
            FullPrice = APH2Price;
         else if (grain_protein > H2Protein)
            FullPrice = H2Price;
         else if(grain_protein > APWProtein)
            FullPrice = APWPrice;
         else
            FullPrice = ASWPrice;
         
         BankBalance = BankBalance + FullPrice * WetYield;
      }
   }   
}
```
      manager WheatFrostHeat (disabled)
        on init:
```
            frost_multiplier=1
            heat_multiplier=1
            frost_multiplier = 1
            cum_frost_multiplier=1
            cum_heat_multiplier=1

            heat_exposure= 0
            heat_stress_days = 0
            mild_heat_stress_days = 0
            mod_heat_stress_days = 0
            sev_heat_stress_days = 0

            mild_exposure = 0
            moderate_exposure = 0
            severe_exposure = 0



            mild_frost_days = 0
            mod_frost_days = 0
            sev_frost_days = 0
            frost_days = 0

            FrostHeatYield = 0
            FrostHeatYieldWet = 0
            MoistureContent = 12.0;
            wheat_in = 0



            ! This work comes from:
            !   Lindsay W. Bell, Julianne M. Lilley, James R. Hunt, and John A. Kirkegaard
            !     (2015) Optimising grain yield and grazing potential of crops across Australia’s
            !      high-rainfall zone: a simulation analysis. 1. Wheat, Crop & Pasture Science, 66, 332-348.
```
        on start_of_day:
```
            if (stagename = 'out') then
              cum_frost_multiplier=1
              cum_heat_multiplier=1
              FrostHeatYield = 0
              wheat_in = 0
            else
              wheat_in = 1
              frost_multiplier = 1
              heat_multiplier = 1
              frost_days = 0
              mild_frost_days = 0
              mod_frost_days = 0
              sev_frost_days = 0
              heat_stress_days = 0
              mild_heat_stress_days = 0
              mod_heat_stress_days = 0
              sev_heat_stress_days = 0
            endif

            if (zadok_stage > 60 and zadok_stage < 79) then
              heat_exposure= 1
            else
              heat_exposure= 0
            endif

            if (heat_exposure = 1 AND maxt >= 32 AND maxt < 34) then
              heat_multiplier = 0.9
              mild_heat_stress_days = 1
            endif

            if (heat_exposure = 1 AND maxt >= 34 AND maxt < 36) then
              heat_multiplier = 0.8
              mod_heat_stress_days = 1
            endif

            if (heat_exposure = 1 AND maxt >= 36) then
              heat_multiplier = 0.7
              sev_heat_stress_days = 1
            endif


            if (zadok_stage > 60 and zadok_stage < 69) then
              mild_exposure = 1
            else
              mild_exposure = 0
            endif

            if (zadok_stage > 60 and zadok_stage < 75) then
              moderate_exposure = 1
            else
              moderate_exposure = 0
            endif

            if (zadok_stage > 60 and zadok_stage < 79) then
              severe_exposure = 1
            else
              severe_exposure = 0
            endif

            if (mild_exposure = 1 AND mint <= 2 AND mint > 0) then
              frost_multiplier = 0.9
              mild_frost_days = 1
            endif

            if (moderate_exposure = 1 AND mint <= 0 AND mint > -2) then
              frost_multiplier = 0.8
              mod_frost_days = 1
            endif

            if (severe_exposure = 1 AND mint <= -2) then
              frost_multiplier = 0.1
              sev_frost_days = 1
            endif

            frost_days = mild_frost_days + mod_frost_days + sev_frost_days
            heat_stress_days =  mild_heat_stress_days + mod_heat_stress_days + sev_heat_stress_days


            if (zadok_stage > 60 and zadok_stage < 79) then
            cum_frost_multiplier = cum_frost_multiplier * frost_multiplier
            cum_heat_multiplier = cum_heat_multiplier * heat_multiplier
            endif

            FrostHeatYield = Yield * cum_frost_multiplier * cum_heat_multiplier
            FrostHeatYieldWet = WetYield * cum_frost_multiplier * cum_heat_multiplier
```
      manager CanolaFrostHeat (disabled)
        on init:
```
            frost_multiplier=1
            heat_multiplier=1
            frost_multiplier = 1
            cum_frost_multiplier=1
            cum_heat_multiplier=1
            heat_exposure= 0
            heat_stress_days = 0
            mild_heat_stress_days = 0
            mod_heat_stress_days = 0
            sev_heat_stress_days = 0

            frost_exposure = 0

            mild_frost_days = 0
            mod_frost_days = 0
            sev_frost_days = 0
            frost_days = 0

            FrostHeatYield = 0
            FrostHeatYieldWet = 0
            FrostHeatGrain_Wt = 0

            FrostHeatGrain_Wt3 = 0

            canola_in = 0


            ! This work comes from:
            !   Julianne M. Lilley, Lindsay W. Bell, and John A. Kirkegaard
            !     (2015) Optimising grain yield and grazing potential of crops across Australia’s
            !     high-rainfall zone: a simulation analysis. 2. Canola,
            !     Crop & Pasture Science, 66, 349-364
```
        on start_of_day:
```
            !Rules for calculation of heat and frost risk

            degree_days = (mint + maxt) / 2
            if (canola.stage >= 6) then
            cum_degree_days = degree_days + cum_degree_days
            else
            cum_degree_days = 0
            endif

            if (cum_degree_days > 0 and cum_degree_days < 630 then ! 630 degree days approx 6 weeks @ 15 dd / day; approx flowering window
            heat_exposure = 1
            else
            heat_exposure = 0
            endif

            if (cum_degree_days > 140 and cum_degree_days < 800) then ! 140 degree days approx 2 weeks @ 10 dd / day, to 6weeks after that
            ! approx water pod window
            frost_exposure = 1
            else
            frost_exposure = 0
            endif

            if (heat_exposure = 1 and maxt >= 30) then
            heat_stress = 1
            else
            heat_stress = 0
            endif

            if (frost_exposure = 1 and mint <= 2) then
            light_frost_stress = 1
            else
            light_frost_stress = 0
            endif

            if (frost_exposure = 1 and mint <= 0) then
            heavy_frost_stress = 1
            else
            heavy_frost_stress = 0
            endif


            if (canola.stage > 0) then  ! reset  each day
            canola_in = 1
            frost_multiplier = 1
            heat_multiplier = 1
            frost_days = 0
            mild_frost_days = 0
            mod_frost_days = 0
            sev_frost_days = 0
            heat_stress_days = 0
            mild_heat_stress_days = 0
            mod_heat_stress_days = 0
            sev_heat_stress_days = 0
            else
            canola_in = 0
            endif

            if (heat_exposure = 1 AND maxt >= 30 AND maxt < 33) then
            heat_multiplier = 0.9
            mild_heat_stress_days = 1
            endif

            if (heat_exposure = 1 AND maxt >= 33 AND maxt < 36) then
            heat_multiplier = 0.82
            mod_heat_stress_days = 1
            endif

            if (heat_exposure = 1 AND maxt >= 36) then
            heat_multiplier = 0.65
            sev_heat_stress_days = 1
            endif



            if (frost_exposure = 1 AND mint <= 2 AND mint > 0) then
            frost_multiplier = 1.0
            mild_frost_days = 1
            endif

            if (frost_exposure = 1 AND mint <= 0 AND mint > -2) then
            frost_multiplier = 0.98
            mod_frost_days = 1
            endif

            if (frost_exposure = 1 AND mint <= -2) then
            frost_multiplier = 0.90
            sev_frost_days = 1
            endif

            frost_days = mild_frost_days + mod_frost_days + sev_frost_days
            heat_stress_days =  mild_heat_stress_days + mod_heat_stress_days + sev_heat_stress_days

            if (canola.stagename = 'out') then
              cum_heat_stress = 0
              cum_light_frost_stress = 0
              cum_heavy_frost_stress = 0
              cum_frost_multiplier=1
              cum_heat_multiplier=1
              FrostHeatYield = 0
              FrostHeatYieldWet = 0
              FrostHeatGrain_wt = 0
              endif

            if (cum_degree_days > 0 and cum_degree_days < 630) then
               cum_heat_stress=cum_heat_stress + heat_stress
               cum_light_frost_stress=cum_light_frost_stress + light_frost_stress
               cum_heavy_frost_stress=cum_heavy_frost_stress + heavy_frost_stress
               cum_frost_multiplier=cum_frost_multiplier * frost_multiplier
               cum_heat_multiplier=cum_heat_multiplier * heat_multiplier
               
               if (sev_frost_days = 1) then
                  SevereFrostCount = SevereFrostCount + 1
               elseif (mod_frost_days = 1) then
                  ModerateFrostCount = ModerateFrostCount + 1
               elseif (mild_frost_days = 1) then
                  MildFrostCount = MildFrostCount + 1
               endif

               if (sev_heat_stress_days = 1) then
                  SevereHeatShockCount = SevereHeatShockCount + 1
               elseif (mod_heat_stress_days = 1) then
                  ModerateHeatShockCount = ModerateHeatShockCount + 1
               elseif (mild_heat_stress_days = 1) then
                  MildHeatShockCount = MildHeatShockCount + 1
               endif
            endif

            if (canola.yield > 0) then
               FrostHeatGrain_wt=canola.Grain_wt*cum_frost_multiplier*cum_heat_multiplier
               FrostHeatYield=canola.Yield*cum_frost_multiplier*cum_heat_multiplier / 1000
               FrostHeatYieldWet=canola.Yieldwet*cum_frost_multiplier*cum_heat_multiplier / 1000
               HIfh = FrostheatGrain_wt /  canola.biomass_wt
               HI = grain_wt / biomass_wt
            endif
```
      operations
      fertiliser
      irrigation
        automatic_irrigation = off
        asw_depth = 600.0  # Depth to which ASW is calculated. (mm)
        crit_fr_asw = 0.5  # Fraction of ASW below which irrigation is applied (0-1.0)
        irrigation_efficiency = 1.0  # Efficiency of the irrigation. (0-1.0)
        default_no3_conc = 0.0  # Nitrate concentration (ppm N)
        default_nh4_conc = 0.0  # Ammonium concentration (ppm N)
        default_cl_conc = 0.0  # Chloride concentration (ppm Cl)
      surfaceom
        PoolName = wheat  # Organic Matter pool name
        type = wheat  # Organic Matter type
        mass = 1000  # Initial surface residue (kg/ha)
        cnr = 80  # C:N ratio of initial residue
        standing_fraction = 0  # Fraction of residue standing
      erosion
        model = freebairn  # Model Name
        slope = 6.5  # Slope of plot in percent (%)
        slope_length = 60.0  # Length of plot (m)
        k_factor = 0.4  # Soil erodibility factor (t/ha/EI 30 )
        p_factor = 1.0  # Supporting practise factor (unitless)
        bed_depth = 4000  # Depth to bedrock (mm)
        profile_reduction = off
        profile_layer_merge = 0.05  # Fraction of original size in which the lowest layer is merged into the layer above (0-1)
        minimum_depth = 100.0  # If the profile erodes to this depth, the simulation is stopped (mm)
      tracker
        variable:
          sum of rain on start_of_day as AccumRain
          sum of unpatched_rain on start_of_day from ThisMonth to ThreeMonthsTime as RainInComingMonths
          value of HayBiomass on flowering as Hay
          sum of runoff on end_of_day from CurrentDay to sowing as SumRunoffToSowing
          sum of soil_loss on end_of_day  from CurrentDay to sowing as SumSoilLossToSowing
          value of AvailableWater on sowing as AvailableWaterAtSowing
          value of Nitrogen on sowing as NitrogenAtSowing
          sum of rain on end_of_day from sowing to harvesting as InCropRain
          sum of irrigation on end_of_day from sowing to harvesting as InCropIrrigation
          sum of fertiliser on end_of_day from emergence to harvesting as TopDressFertiliser
          sum of fertiliser on end_of_day from sowing to emergence as SowingFertiliser
          sum of fertiliser on end_of_day from start_simulation to sowing as PreSowingFertiliser
          sum of rain on end_of_day from GSRStart to GSREnd as GSR
          sum of n_stress_expan on end_of_day from sowing to harvesting as CumNStressExpan
          sum of n_stress_photo on end_of_day from sowing to harvesting as CumNStressPhoto
          sum of NUptakeKgHa on end_of_day from sowing to harvesting as TotalNUptake
          sum of es on end_of_day from sowing to harvesting as TotalES
          sum of ep on end_of_day from sowing to harvesting as TotalEP
          sum of rain on end_of_day from startofyear to endofyear as AnnualRain
          count of WaterLog1OrMore from sowing to harvesting as NumWaterLoggingEventsFor1OrMoreDays
          count of WaterLog2OrMore from sowing to harvesting as NumWaterLoggingEventsFor2OrMoreDays
          count of WaterLog3OrMore from sowing to harvesting as NumWaterLoggingEventsFor3OrMoreDays
          count of WaterLog4OrMore from sowing to harvesting as NumWaterLoggingEventsFor4OrMoreDays
          count of WaterLog5OrMore from sowing to harvesting as NumWaterLoggingEventsFor5OrMoreDays
          count of WaterLog6OrMore from sowing to harvesting as NumWaterLoggingEventsFor6OrMoreDays
          sum of Mineralisation on end_of_day from sowing to harvesting as InCropMineralisation
          sum of NitrogenTieUp on end_of_day from sowing to harvesting as InCropNitrogenTieUp
          sum of dnit() on end_of_day from sowing to harvesting as InCropNitrification
          sum of leach_no3 on end_of_day from sowing to harvesting as InCropNLeaching
          sum of sw_stress_expan on end_of_day from sowing to harvesting as CumSWStressExpan
          sum of sw_stress_photo on end_of_day from sowing to harvesting as CumSWStressPhoto
          sum of sw_stress_photo on end_of_day from sowing to floral_initiation as CumSWStressPhotoSowToFI
          sum of sw_stress_photo on end_of_day from floral_initiation to flowering as CumSWStressPhotoFIToFlowering
          sum of sw_stress_photo on end_of_day from flowering to harvesting as CumSWStressPhotoFloweringToHarvesting
          sum of n_stress_photo on end_of_day from sowing to floral_initiation as CumNStressPhotoSowToFI
          sum of n_stress_photo on end_of_day from floral_initiation to flowering as CumNStressPhotoFIToFlowering
          sum of n_stress_photo on end_of_day from flowering to harvesting as CumNStressPhotoFloweringToHarvesting
          sum of rain on end_of_day from CurrentDay to harvesting as RainToMaturity
          sum of Mineralisation on end_of_day from CurrentDay to harvesting as MineralisationToMaturity
          sum of NitrogenTieUp on end_of_day from CurrentDay to harvesting as NitrogenTieUpToMaturity
          sum of runoff on end_of_day from start_simulation to end_simulation as TotalRunoff
          sum of drain on end_of_day from start_simulation to end_simulation as TotalDrainage
          sum of leach_no3 on end_of_day from start_simulation to end_simulation as TotalNo3Leaching
          sum of n2o_atm() on end_of_day from start_simulation to end_simulation as TotalN2O
          average of ep on last 3 end_of_day from sowing to harvesting as WeeklyEP
      outputfile Yearly (disabled): filename=Base Yearly.out; title=Base Yearly
        variables
          variable:
            dd/mm/yyyy as Date
            SowDate format dd/mm/yyyy
            DaysAfterSowing
            flowering_das
            biomass
            wetyield
            Grain_protein
            grain_n
            grain_no
            oil_conc
            Hay
            Zadok11Das
            Zadok12Das
            Zadok13Das
            Zadok14Das
            Zadok15Das
            Zadok16Das
            Zadok30Das
            Zadok31Das
            Zadok32Das
            Zadok37Das
            Zadok39Das
            Zadok45Das
            Zadok55Das
            Zadok65Das
            Zadok75Das
            root_depth
            MildFrostCount
            ModerateFrostCount
            SevereFrostCount
            MildHeatShockCount
            ModerateHeatShockCount
            SevereHeatShockCount
            MildFrostAdditiveCount
            ModerateFrostAdditiveCount
            MildHeatShockAdditiveCount
            ModerateHeatShockAdditiveCount
            AmountWaterAboveCLL
            NumWaterLoggingEventsFor1OrMoreDays
            NumWaterLoggingEventsFor2OrMoreDays
            NumWaterLoggingEventsFor3OrMoreDays
            NumWaterLoggingEventsFor4OrMoreDays
            NumWaterLoggingEventsFor5OrMoreDays
            NumWaterLoggingEventsFor6OrMoreDays
            MineralisationToMaturity
            NitrogenTieUpToMaturity
            BankBalance
            TotalRunoff
            TotalDrainage
            TotalNO3Leaching
            TotalN2O
            ChangeInOrganicC
            AvailableWaterAtSowing
            AvailableWater as AvailableWaterAtHarvest
            InCropRain
            InCropIrrigation
            NitrogenAtSowing
            Nitrogen as NitrogenAtHarvest
            PreSowingFertiliser
            SowingFertiliser
            TopDressFertiliser
            PeanutPodYield
            Stage
            Stage2Das
            Stage3Das
            Stage4Das
            Stage5Das
            Stage6Das
            Stage7Das
            Stage8Das
            Stage9Das
            FrostHeatYieldWet
        events Reporting Frequency: event=harvesting
      outputfile Monthly (disabled): filename=Base Monthly.out; title=Base Monthly
        variables
          variables: dd/mm/yyyy as Date, AccumRain
        events Reporting Frequency: event=start_month
      outputfile Daily (disabled): filename=Base Daily.out; title=Base Daily
        variables
          variables: dd/mm/yyyy as Date, AccumRain, Biomass, Z, Zero, MildFrostCount, ModerateFrostCount, SevereFrostCount, MildHeatShockCount, ModerateHeatShockCount, SevereHeatShockCount, root_depth, AmountWaterAboveCLL, AvailableWater, PAWC, Rain, irrig_tot, Irrigation, es, ep, drain, runoff, Nitrogen, Mineralisation, fertiliser, NInPlant, dnit(), leach_no3, NO3AvailToRoots, NitrogenTieUp, CLLToday, DULToday, SWToday, CritSWToday, sw_stress_expan, n_stress_expan, NUptakeKgHa, AmountWaterLeft, BankBalance, DaysAfterSowing, PeanutPodYield, aflo_perc, TTAfterSowing, Stage, watersupply, TAW, RAW, FCW, WeeklyEP, NextIrrig, PercentCover, FASW, ave_soil_temp(1) as SoilTemp, dlayer, sw, no3, nh4
        events Reporting Frequency: event=post
      outputfile Next10Days (disabled): filename=Base Next10Days.out; title=Base Next10Days
        variables
          variables: dd/mm/yyyy as Date, Z, AmountWaterAboveCLL, AvailableWater, Mineralisation, NInPlant, NO3AvailToRoots, NitrogenTieUp, SWToday, CritSWToday
        events Reporting Frequency: event=InTenDayWindow
