Simulations: Version=6
  Simulation Base
    Clock
    Weather: FileName=\Examples\MetFiles\dalby.met
    Summary SummaryFile
    SoilArbitrator
    Zone Paddock: Area=1; Slope=0
      Manager Management
        CropName = Wheat
```csharp
          using Models.Core;
using System.Collections.Generic;
using System.Text;
using Models.Soils;
using Models.PMF;
using Models;
using System.Xml.Serialization;
using APSIM.Shared.Utilities;
using System;
namespace Models
{
	[Serializable] 
	public class Script : Model
	{
		private Plant crop = null;
		
		[Description("Crop name")]
		public string CropName { get; set; }
		
		[EventSubscribe("Commencing")]
		private void OnSimulationCommencing(object sender, EventArgs e)
		{	
			crop = Apsim.Find(this, CropName) as Plant;
			if (crop == null)
				throw new Exception("Cannot find crop: " + CropName);
		}
		
		[EventSubscribe("DoManagement")]
		private void OnDoManagement(object sender, EventArgs e)
		{
			if (crop.Phenology.CurrentPhaseName == "Maturing")
			{
				crop.Harvest();
				crop.EndCrop();
			}
		}
	}
}
```
      Operations
      SurfaceOrganicMatter: PoolName=wheat; type=wheat; mass=1000; standing_fraction=0; cnr=80; CriticalResidueWeight=2000; OptimumDecompTemp=20; MaxCumulativeEOS=20; CNRatioDecompCoeff=0.277; CNRatioDecompThreshold=25; TotalLeachRain=25; MinRainToLeach=10; CriticalMinimumOrganicC=0.004; DefaultCPRatio=0; DefaultStandingFraction=0; StandingExtinctCoeff=0.5; FractionFaecesAdded=0.5
        Pools:
          {PoolName=wheat, ResidueType=wheat, Mass=1000, CNRatio=80, StandingFraction=0}
        ResidueTypes ResidueTypesList: LoadFromResource=ResidueTypes
      Report Yearly
        VariableNames:
          [Clock].Today
          Wheat.Zadok.Stage
          Wheat.Phenology.CurrentStageName
          Wheat.AboveGroundLive.Wt
          Wheat.AboveGroundDead.Wt
          Wheat.AboveGround.Wt
          Wheat.AboveGround.N
          Wheat.Grain.Yield
          Wheat.Grain.Protein
          Wheat.Grain.Size
          Wheat.Grain.GrainNo
          Wheat.Grain.Wt
          Wheat.Grain.N
          Wheat.Leaf.LAI
          Wheat.Leaf.Live.Wt
          Wheat.Leaf.Live.N
          Wheat.Head.Wt
          Wheat.Head.N
          Wheat.Stem.Live.Wt
          Wheat.Stem.Live.N
          Wheat.Root.RootDepth
          Wheat.EP
          Wheat.SWStress.Photo
          Wheat.SWStress.Expansion
          Wheat.NStress.Photo
          Wheat.NStress.Expansion
          Wheat.Total.Wt
      Report Monthly
        VariableNames:
          [Clock].Today
      Report Daily: same as Base.Paddock.Yearly
      Report Next10Days
      MicroClimate: a_interception=0; b_interception=1; c_interception=0; d_interception=0; soil_albedo=0.23; sun_angle=15; soil_heat_flux_fraction=0.4; night_interception_fraction=0.5; refheight=2; albedo=0.15; emissivity=0.96; RadIntTotal=0
      SoluteManager
      Irrigation
      Fertiliser
  DataStore
